p := 0.5
P1 := 0.45
q1 := 1 - P1
P2 := 0.35
q2 := 1 - P2
A := [
    p - 1, p*(1 - P2), 0, 0, 0, 0;
    0, p*P2 - 1, p*(1 - P1), p*(1 - P1)*(1 - P2) + p*(1 - P1)*P2, 0, 0;
    1 - p, (1 - p)*(1 - P2), p*P1 - 1, p*P1*(1 - P2), 0, 0;
    0, (1 - p)*P2, (1 - p)*(1 - P1), p*P1*P2 + (1 - p)*(1 - P1)*P2 + (1 - p)*(1 - P1)*(1 - P2) - 1, p*(1 - P1), p*(1 - P1)*(1 - P2) + p*(1 - P1)*P2;
    0, 0, (1 - p)*P1, (1 - p)*P1*(1 - P2), p*P1 + (1 - p)*P1 - 1, (1 - p)*P1*(1 - P2) + p*P1*(1 - P2);
    1, 1, 1, 1, 1, 1
] = [
    -0.5, 0.325, 0, 0, 0, 0;
    0, -0.825, 0.275, 0.275, 0, 0;
    0.5, 0.325, -0.775, 0.14625, 0, 0;
    0, 0.175, 0.275, -0.64625, 0.275, 0.275;
    0, 0, 0.225, 0.14625, -0.55, 0.2925;
    1, 1, 1, 1, 1, 1
]
C := [0; 0; 0; 0; 0; 1]
A^-1 = [
    -2.14971, -0.937591, -0.332694, -0.332694, 0, 0.0914907;
    -0.230326, -1.44245, -0.511836, -0.511836, 0, 0.140755;
    -1.35769, -1.12743, -1.69038, -0.604897, 0, 0.166347;
    0.666707, 0.436453, 0.15487, -0.930611, 0, 0.255918;
    0.819346, 0.840868, 0.401752, 0.503214, -1.18694, 0.208797;
    2.25167, 2.23015, 1.97829, 1.87682, 1.18694, 0.136692
]
B := A^-1*C
B = [0.0914907; 0.140755; 0.166347; 0.255918; 0.208797; 0.136692]
Lср := 1*B(1) + 1*B(2) + 2*B(3) + 2*B(4) + 3*B(5)
Pотк := (1 - P1)*P2*B(3) + (1 - P1)*P2*B(5) + (1 - p)*P1*B(5) + (1 - p)*P1*B(4)
A := (1 - P2)*(B(1) + B(3) + B(5))
Lоч := B(4) + B(5)
Pотк = 0.153313
Q := 1 - Pотк
A = 0.346687
Wоч := Lоч/A
Q = 0.846687
Lср = 1.64661
Wср := Lср/A
Lоч = 0.345489
K1 := B(2) + B(3) + B(4) + B(5)
Wоч = 0.996545
Wср = 4.74955
K2 := B(1) + B(3) + B(5)
K1 = 0.767754
K2 = 0.533365
